<?xml version="1.0"?>
<Node name="root"  gravity="0 -9.8 0"  dt="0.02"  >
	<RequiredPlugin name="requiredPlugin1"  printLog="1"  pluginName="SiElegansPlugin" />
	<RequiredPlugin name="requiredPlugin2"  printLog="1"  pluginName="ColladaSceneLoader" />
	<VisualStyle name="visualStyle1"  displayFlags="showVisual hideBehavior showCollision hideMapping hideOptions" />
	<DefaultPipeline name="CollisionPipeline"  verbose="0" />
	<BruteForceDetection name="N2" />
	<SiElegansAnimationLoop name="myAnimationLoop"  URL_get="no_CURL"  URL_post="no_CURL"  URL_finish="no_CURL"  write_traces="0" />
	<DefaultContactManager name="collision response"  response="SiElegans" />
	<DiscreteIntersection name="discreteIntersection1" />
	<Node 	 name="c elegans"  gravity="0 0 0"  >
		<CGLinearSolverTraces template="GraphScattered" name="myCG"  iterations="25"  tolerance="0.001"  threshold="0.001"  write_traces="0" />
		<EulerImplicitSolver name="eulerImplicitSolver0" />
		<MeshTopology name="mesh"  fileTopology="worm.msh" />
		<MechanicalObject template="Vec3d" name="dofs"  position="0 0 0"  velocity="0 0 0"  force="0 0 0"  externalForce="0 0 0"  derivX="0 0 0"  rest_position="-44.9768 -3.624 14.908 -44.9768 -3.0128 15.2776 -44.9768 -2.0064 15.2776 -44.9768 -1.1504 14.6776 -44.9768 -0.8384 13.6864 -44.9768 -1.1504 12.6944 -44.9768 -2.0064 12.0944 -44.9768 -3.0128 12.0944 -44.9768 -3.624 12.464 -44.9768 -3.908 13.6864 -38.8288 -4.8256 10.8432 -36.0176 -4.8256 10.7896 -36.0176 -5.536 13.6864 -38.8288 -5.536 13.6864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"  restScale="1"  translation="0 5 0"  rotation="0 -90 0"  scale3d="1 1 1" />
		<TetrahedronSetGeometryAlgorithms template="Vec3d" name="tetrahedronSetGeometryAlgorithms1"  drawTriangles="1" />
		<StandardTetrahedralFEMForceFieldTwoMaterials template="Vec3d" name="standardFEM"  materialName="StVenantKirchhoff"  ParameterSet="4.82759e+006 4.34483e+007"  secondMaterialStart="330"  SecondParameterSet="482759 4.34484e+006" />
		<PatternPlusFileActivation template="Vec3d" name="meshMatrixMass0"  massDensity="1000"  f_fileNodes="data/force_nodes - all the muscles.txt"  activation_order_file="data/activation_order.txt"   muscle_position_file="data/muscles_positions.json"  file_extremes="data/muscle_extremes.txt"
		file_scale="150000"  pattern_scale="150000"  min_activated_muscles="0"  max_activated_muscles="4"
		neuron_timestep="0.001"
		activation_period="12.5664" />
		<Friction template="Vec3d" name="myFriction0"  mu="0 0 0"  floor_K="800000"  spring_K="0 100000 5000"
		write_traces="0"  write_traces_diff="0"  friction_file="data/friction_relations.txt" />
	</Node>
	<Node 	 name="Floor"  >
		<MeshTopology name="Topology Floor"  fileTopology="floor.obj" />
		<MechanicalObject template="Vec3d" name="Floor Particles"  position="0 0 0"  velocity="0 0 0"  force="0 0 0"  externalForce="0 0 0"  restScale="1"  translation="0 40.45 0"  scale3d="3.5 3.5 3.5" />
		<TTriangleModel template="Vec3d" name="Floor Triangle For Collision"  active="0"  moving="0"  simulated="0" />
	</Node>
</Node>
